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/batch
! ANSYS input file written by Workbench version 19.0 RELEASE
! File used for geometry attach: D:\Data\Research\Publications\SMO\ANSYS files\MMM2\MMM01_files\dp0\Geom-3\DM\Geom-3.agdb
/title,MMM01--Transient (F5)
/com,--- Data in consistent MKS units. See Solving Units in the help system for more information.
/units,MKS
/prep7
! Turn off shape checking because checks already performed inside WB mesher.
! See help system for more information.
SHPP,OFF,,NOWARN
etcon,set             ! allow ANSYS to choose best KEYOP's for 180x elements
/com,*********** Nodes for the whole assembly ***********
nblock,3,,2541
(1i9,3e20.9e3)
        1   -1.666342583E-002    3.676540659E-001   -2.000006677E-001
        2   -1.666413529E-002    3.603174095E-001   -4.000005861E-001
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-1
/com,*********** Elements for Body 1 "Plate" ***********
et,1,186
keyo,1,2,1          ! set full integration on SOLID186
eblock,19,solid,,300
(19i9)
        1        1        1        1        0        0        0        0       20        0        1      394      576      695      455      395      635      696      454
     1789     2134     1912     1788     1792     2251     1910     1791     1787     2133     2310     1909
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-1
/com,*********** Send User Defined Coordinate System(s) ***********
csys,0
toffst,273.15,  ! Temperature offset from absolute zero
/com,*********** Set Reference Temperature ***********
tref,22.
/com,*********** Send Materials ***********
Temperature = 'TEMP' ! Temperature
MP,DENS,1,2000,	! kg m^-3
MP,ALPX,1,0.00023,	! C^-1
MP,C,1,2300,	! J kg^-1 C^-1
MP,KXX,1,0.28,	! W m^-1 C^-1
MP,EX,1,1100000000,	! Pa
MP,NUXY,1,0.42,

!************************* Model Summary ********************
!Plate,	Polyethylene 4,	matid,	1
!************************* End Model Summary ********************
CMBLOCK,N1      ,NODE,        1
(8i10)
      1050
/com,*********** Send Named Selection as Node Component ***********
CMBLOCK,BEAM4EDG,NODE,      484
(8i10)
       113       114       115       116       117       118       119       120
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/com,*********** Send Named Selection as Node Component ***********
CMBLOCK,FIXED_EDG,NODE,      102
(8i10)
       173       174       175       176       177       178       179       180
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/com,*********** Send Named Selection as Node Component ***********
CMBLOCK,THICK   ,NODE,       56
(8i10)
       113       173       176       184       192       252       253       258
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
/com,*********** Send Named Selection as Node Component ***********
CMBLOCK,FSI     ,NODE,     1338
(8i10)
       113       114       115       116       117       118       119       120
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/com,*********** Send Named Selection as Node Component ***********
CMBLOCK,FIX     ,NODE,      282
(8i10)
       173       174       175       176       177       178       179       180
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/com,*********** Send Named Selection as Element Component ***********
esel,s,mat,,1
cm,PLATE,elem
esel,all
/com,*********** Send Named Selection as Element Component ***********
esel,s,mat,,1
cm,PLATE2,elem
esel,all
/com,*********** Fixed Supports ***********
CMBLOCK,_FIXEDSU,NODE,      282
(8i10)
       173       174       175       176       177       178       179       180
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cmsel,s,_FIXEDSU
d,all,all
nsel,all
/com,*********** Create FSI Flags ***********
CMBLOCK,FSIN_1  ,NODE,     1338
(8i10)
       113       114       115       116       117       118       119       120
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SF,FSIN_1,FSIN,1
nsel,all
fini
/com,****************************************************************************
/com,*************************    SOLUTION       ********************************
/com,****************************************************************************
/solu
antype,4                   ! transient analysis
nlgeom,on                  ! Turn on Large Deformation Effects
kbc,1                      ! stepped BC's
eqsl,pcg,1e-8,,,,,,1
cntr,print,1               ! print out contact info and also make no initial contact an error
rstsuppress,none           ! don't suppress anything due to presense of FSI loading
dmpoption,emat,no             ! Don't combine emat file for DANSYS
dmpoption,esav,no             ! Don't combine esav file for DANSYS
cmwrite                    ! Export components due to presence of FSI loading
trnopt,full,,,,,hht        ! HHT time integration method
tintp,0.1 ! Numerical Damping
nldiag,cont,iter           ! print out contact info each equilibrium iteration
SCOPT,NO                   ! Allow negative coefficients due to System Coupling
rescontrol,define,last,last,,dele	   ! Program Controlled
/com,****************************************************
/com,******************* SOLVE FOR LS 1 OF 1 ****************
autots,on                   ! User turned on automatic time stepping
deltim,0.01,0.01,0.01,OFF
time,1.
timint,on                  ! Turn on time integration effects
outres,erase
outres,all,none
outres,nsol,all
outres,rsol,all
outres,strs,all
outres,epel,all
outres,eppl,all
outres,v,all
outres,a,all
stabilize,off                   ! Stabilization turned OFF by user
! *********** WB SOLVE COMMAND ***********
! check interactive state
*get,ANSINTER_,active,,int
*if,ANSINTER_,ne,0,then
/eof
*endif
solve
/com *************** Write FE CONNECTORS *********
CEWRITE,file,ce,,INTE
/com,****************************************************
/com,*************** FINISHED SOLVE FOR LS 1 *************
*get,_PCGITER,active,,solu,cgiter
/post1
! ****** Begin Command Snippet ******
! ****** Begin Command Snippet ******
!   Commands inserted into this file will be executed immediately after the ANSYS /POST1 command.

!   Active UNIT system in Workbench when this object was created:  Metric (cm, g, dyne, s, V, A)
!   NOTE:  Any data that requires units (such as mass) is assumed to be in the consistent solver unit system.
!                See Solving Units in the help system for more information.


/INPUT,D:\Data\post.txt,,,,1
! ****** End   Command Snippet ******
fini
